M := [
    "x\n", 10, 11, 12, 13, 14, 15;
    0.5, 0, 0, 0, 0, 0, 0;
    0.65, 0, 0, 0, 0, 0, 0;
    0.8, 0, 0, 0, 0, 0, 0;
    0.95, 0, 0, 0, 0, 0, 0;
    1.1, 0, 0, 0, 0, 0, 0;
    1.25, 0, 0, 0, 0, 0, 0;
    1.4, 0, 0, 0, 0, 0, 0
]
j := 0 .. 6
i := 0 .. 5
M[j + 1, i + 1] := atan(0.5 + j*0.15) + sqrt((10 + i)*nthroot((0.5 + j*0.15), 3)) - sum(sqrt((e^(-k*(0.5 + j*0.15)) + (0.5 + j*0.15)^(k - 1)))/(cos(k*(0.5 + j*0.15)) + sin(k*(0.5 + j*0.15))), k = 1 .. (10 + i))
M = [
    "x\n", 10, 11, 12, 13, 14, 15;
    0.5, 2.72772, -19.8727, -19.8213, -19.7304, -19.6319, -19.5342;
    0.65, 3.23922, 3.29819, 3.34451, 3.18759, 3.41245, 3.57383;
    0.8, 12.7319, 14.3304, 14.7255, 15.0506, 15.4838, 14.9278;
    0.95, -5.72456, -5.00825, -3.42775, -4.2522, -4.62456, -5.28697;
    1.1, -380.478, -383.952, -385.011, -387.015, -384.018, -382.506;
    1.25, 23.5441, 21.3632, 52.7043, 55.6304, 61.4117, 56.2242;
    1.4, -14.8937, -6.45417, -1.57826, -40.7433, -46.9029, -83.2485
]
